ω := 500*2*π*sec^-1
# Merlin Gd chopper:
R := 5*mm
H := 0.2*mm
ρ := 10^6*m
γ := ω*R^2/H = 392.699 m/s
ω = 3141.59 1/s
L_mod := 10 m
L_det := 2.5*m
L := 1 m
h := 6.636*10^-34*m^2*kg/s
m_n := 1.675*10^-27*kg
ε_beg := 150
ε_end := 11
Δt := R/γ
Δt = 1.27324e-5 s
v(ε) := sqrt(2*1.60218*10^-22*J/m_n*ε)
v(ε_beg) = 5356.84 m/s
v(ε_end) = 1450.64 m/s
κ(ε) := |1/v(ε) - 1/(2*ω*ρ)|^-1
κ(ε_beg) = 5356.85 m/s
κ(ε_end) = 1450.64 m/s
τ_e_mod(ε) := (L_mod + L)*ω*R/(v(ε)*H)
τ_e_mod(ε_end) = 595.557
τ_e_mod(ε_beg) = 161.277
# Resolution by '0' energy level:
Δε(ε) := ε*2*Δt*v(ε)/L_det
Δε(ε_beg) = 8.18465
Δε(ε_end) = 0.162537
2*Δt*v(ε_beg)/L_det = 0.0545643
2*Δt*v(ε_end)/L_det = 0.0147761
γ_p(ε) := 4*γ*|1/v(ε) - 1/(2*ω*ρ)|
γ_p(ε_beg) = 0.293232
γ_p(ε_end) = 1.08283
ω = 3141.59 1/s
t_m := τ_e_mod(ε_beg)
f_ch(u, τ) :=
    gm ← 4*R*u/L
    return 0 if gm > 4
    otherwise
        ff ← 1 - L/(4*R*u)*(2*R/L*u + |τ - t_m|)^2
        if gm ≥ 1 and gm ≤ 4
            return 0 if ff < 0
            return ff otherwise
        otherwise
            f1 ← 1 - 2*|τ - t_m|
            return 0 if f1 < 0
            otherwise
                return ff if f1 > 1 - 4*u*R/L
                return f1 otherwise
u_0 := t_m
ΔT := 20
Np := 401
δ_t := ΔT/Np
i := 0 .. Np - 1
t[i] := t_m + (-ΔT/2 + δ_t*i)
4*γ*u_0*Δt/L = 3.22555
η(t) :=
    return 0 if t < 0.95*t_m
    return 1 otherwise
t_m = 161.277
a := 10
Σ := 0.01
R_s := 0.1
β := 0.01
f_v(u, t) := η(t)*a*t^2*e^(-Σ*(t - t_m)*u)*((1 - R_s) + R_s*β*u*e^(-β*(t - t_m)))
α := 0.1
f_v(u, t) := η(t)*0.1*e^(-α*(t - t_m))
u_0 = 161.277
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τ_min := 10^-6
τ_min = 1e-6
t_m = 161.277
τ_max := 1*L/R
τ_max = 200
t_m = 161.277
Δτ_f := (τ_max - τ_min)/(Np - 1)
Δτ_f = 0.5
τ_f[i] := τ_min + i*Δτ_f
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I[i] := L/Δt*Δτ_f*sum(f_v(τ_f[j], t_m)/τ_f[j]^2*f_ch(τ_f[j], t[i] - τ_f[j]), j = 0 .. Np - 1)
I1[i] := L/Δt*Δτ_f*sum(f_v(τ_f[j], t_m)/τ_f[j]^2*f_ch(u_0, t[i] - τ_f[j]), j = 0 .. Np - 1)
t_m = 161.277
u_0 = 161.277
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I1_ch[i] := f_ch(u_0, t[i])
S1_ch := cfft(I1_ch)
S_i1 := cfft(I1)
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length(S1_ch) = 401
Ret[i] := S_i1[i]/(S1_ch[i] + 10^-12)
I1_r := icfft(Ret)
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