ω := 500*2*π*sec^-1
# Merlin Gd chopper:
R := 5*mm
H := 0.2*mm
ρ := 10^6*m
γ := ω*R^2/H = 392.699 m/s
ω = 3141.59 1/s
L := 1 m
h := 6.636*10^-34*m^2*kg/s
m_n := 1.675*10^-27*kg
ε_beg := 150
ε_end := 11
Δt := R/γ
Δt = 1.27324e-5 s
v(ε) := sqrt(2*1.60218*10^-22*J/m_n*ε)
v(ε_beg) = 5356.84 m/s
v(ε_end) = 1450.64 m/s
κ(ε) := |1/v(ε) - 1/(2*ω*ρ)|^-1
κ(ε_beg) = 5356.85 m/s
κ(ε_end) = 1450.64 m/s
γ_p(ε) := 4*γ*|1/v(ε) - 1/(2*ω*ρ)|
γ_p(ε_beg) = 0.293232
γ_p(ε_end) = 1.08283
ω = 3141.59 1/s
t_0 := 1
f_ch(u, τ) :=
    gm ← 4*R*u/L
    return 0 if gm > 4
    otherwise
        ff ← 1 - L/(4*R*u)*(2*R/L*u + |τ - t_0|)^2
        if gm ≥ 1 and gm ≤ 4
            return 0 if ff < 0
            return ff otherwise
        otherwise
            f1 ← 1 - 2*|τ - t_0|
            return 0 if f1 < 0
            otherwise
                return ff if f1 > 1 - 4*u*R/L
                return f1 otherwise
u_0 := 1
ΔT := 15
Np := 400
δ_t := ΔT/Np
i := 0 .. Np - 1
t[i] := -ΔT/2 + δ_t*i
4*γ*u_0*Δt/L = 0.02
α := 1
f_v(v, t) := 0.1*e^(-α*v*(t - t_0))
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Int(t) := integral(f_ch(u_0, t[i] - u), u = t_0 - 0.5 .. t_0)
Int(0) =  # error: This calculation does not converge to a solution.
I[i] := L/Δt*sec/cm*□  # error: This placeholder is empty.
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