Interest := 0.0338
LT := 3.5
SUMM := 7000
FEE := 0
S_Tot := SUMM + FEE
DII := Interest/12
N_P := LT*12
S_Tot = 7000
Q := 1 + DII
Payment(SUMM, Interest, N_P) :=
    Q ← 1 + Interest/12
    SUMM*Q^N_P/(Q^N_P - 1)*Interest/12
Payment(S_Tot, Interest, N_P) = 176.954
N_P = 42
i := 0 .. N_P - 1
Loan(SUMM, np, DII, overpayment) :=
    Q ← 1 + DII
    pmnt ← SUMM*Q^N_P/(Q^N_P - 1)*DII + overpayment
    rez ← (SUMM - pmnt/DII)*Q^np + pmnt/DII
    rez
Capital_Repaid(Summ, Comp_Termn_Month, rate, overpayment) :=
    rate_pMonth ← rate/12
    Summ - Loan(Summ, Comp_Termn_Month, rate_pMonth, overpayment)
Interest_paid(Summ, Comp_Termn_Month, rate, LoanTermMonth, overpayment) :=
    MonthlyPayment ← Payment(Summ, rate, LoanTermMonth) + overpayment
    AllPaid ← MonthlyPayment*Comp_Termn_Month
    interest ← AllPaid - Capital_Repaid(Summ, Comp_Termn_Month, rate, overpayment)
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Q^N_P = 1.12539
Loan(S_Tot, N_P, DII, 0) = 0
Loan(S_Tot, 1, DII, 10) = 6832.76
Capital_Repaid(S_Tot, 12, Interest, 0)
Payment(S_Tot, Interest, LT*12) = 176.954
Interest_Repaid := Payment(S_Tot, Interest, N_P)*12 - Capital_Repaid(S_Tot, 12, Interest, 0)
Interest_Repaid = 207.093
Interest_paid(S_Tot, N_P, Interest, N_P, 0) = 432.054
Interest_paid(S_Tot, 20, Interest, N_P, 170) = 216.212
Interest_paid(S_Tot, 6, Interest, N_P, 0) = 111.632
Interest_paid(S_Tot, 6, Interest, N_P, 250) = 101.029
Interest_paid(S_Tot, 12, Interest, N_P, 0) = 207.093
Interest_paid(S_Tot, 12, Interest, N_P, 250) = 160.179
# _________________________________________________________________________________________
200*12 = 2400
100*24 - 1500 = 900
5200.201 - 2370.175 - 1500 = 1330.03
60*24 = 1440
