h := 6.636*10^-34*m^2*kg/s
m_n := 1.675*10^-27*kg
k_b := 1.38064852*10^-23*J/K
eV := 1.60218*10^-19*J
ω := 500*2*π*sec^-1
# Merlin Gd chopper:
R_ch := 5*mm
H_ch := 0.2*mm
ρ := 10^6*m
γ := ω*R_ch^2/H_ch = 392.699 m/s
ω = 3141.59 1/s
L_sam := 11.8
L_mod := 10 m
L_mon1 := -1.504 + L_sam + 0.0001
L_mon2 := 4.247 + L_sam + 0.0001
L_mon1 = 10.2961
h := 6.636*10^-34*m^2*kg/s
m_n := 1.675*10^-27*kg
L_det := 11.8 + 2.5
ε_beg := 18
ε_end := 10
# Chopper opening time:
Δt := R_ch/γ
Δt = 1.27324e-5 s
v(ε) := sqrt(2*1.60218*10^-22*J/m_n*ε)
2.5 m/v(ε_end) = 0.00180749 s
v(ε_end) = 1383.13 m/s
# Time of flight in units of chopper opening:
τ_e(ε, L) := L*ω*R_ch/(v(ε)*H_ch)
(1.856*10^3*(1.807*10^-3)) = 3.35379
v(ε_beg) = 1855.66 m/s
τ_e(151.9276, L_mon1*m) = 149.996
# time difference due to different distance between closest and furtherst detectors:
τ_shift := 0.4*m/v(ε_beg)
τ_shift/Δt = 16.9297
L_assumed := L_det - L_mon1
L_det = 14.3
L_assumed = 4.0039
v(ε_beg)^2*m_n/(2*eV*10^-3) = 18  # (meV)
(L_sam - L_mon1)*m/(v(ε_beg)*Δt) = 63.6516
ΔL_det := L_det - L_sam
(L_sam - L_mon1) = 1.5039
ΔL_det = 2.5
# [component: outputs R_sig]
# [component: outputs tofSig]
τ_sample := L_sam*m/(v(ε_beg)*Δt)
τ_sample = 499.427
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transpose(x, shift, L) :=
    Np ← length(x)
    for i ∈ 0 .. Np - 1
        x[i] ← x[i] - shift
        x[i] ← x[i] + L if x[i] < L/2
        x[i] ← x[i] - L if x[i] > L/2
    return x
expand1(s, Np, L) :=
    x_min ← min(s[:, 0])
    x_max ← max(s[:, 0])
    δL ← 2*L/(Np - 1)
    for i ∈ 0 .. Np - 1
        rez[i, 0] ← -L + δL*i
        rez[i, 1] ← 0 if (rez[i, 0] < x_min) or rez[i, 0] > x_max
        rez[i, 1] ← linterp(s[:, 0], s[:, 1], rez[i, 0]) otherwise
    return rez
normalize(z) :=
    Nrm ← (z[1, 0] - z[0, 0])*sum(z[:, 1])
    z[:, 1] ← z[:, 1]/Nrm
    return z
Np := 200
i := 0 .. Np - 1
Δ := T/(N_s - 1)
ΔT := 45
T0 := 21.904
tofSig[:, 0] := tofSig[:, 0]*10^-6*sec/Δt - T0
R_sig[:, 0] := R_sig[:, 0] - τ_sample
I := expand1(tofSig, Np, ΔT)
Rf := expand1(R_sig, Np, ΔT)
Rf := normalize(Rf)
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I_ω := cfft(I[:, 1])
R_ω := cfft(Rf[:, 1])
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# high frequency filter for spectra:
if(|n - 50| < 40, 0, D[n])
ε_Res := 10^-7
filt(I, R, Nf) :=
    np ← length(I)
    cent ← np/2
    for i ∈ 0 .. np - 1
        rez[i] ← 0 if |i - cent| < Nf
        otherwise
            rez[i] ← 0 if |R[i]| < ε_Res
            rez[i] ← I[i]/(R[i] + ε_Res) otherwise
If1 := filt(I_ω, R_ω, 0)
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Δ_τ := π/(Np - 1)
Ifr := 1/(Δ*sqrt(Np))*icfft(If1)
τ[i] := -π/2 + Δ_τ*i
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u_mi := min(u)
u_ma := max(u)
Δu := 1/u_mi - 1/u_ma
Δu =  # error: This variable is undefined.
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C_f := v(ε_beg)/0.1393
vs[i] := ΔL_det*m/(u[i]*Δt)
εr[i] := v(ε_beg)^2*m_n/(2*eV*10^-3) - vs[i]^2*m_n/(2*eV*10^-3)
fr[i] := Ifr[i]*u[i]^2*ΔL_det/ΔT
# [component: outputs SigEi22]
m0 := max(SigEi22[:, 1])
m1 := max(fr)
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