h := 6.636*10^-34*m^2*kg/s
m_n := 1.6749*10^-27*kg
k_b := 1.38064852*10^-23*J/K
eV := 1.60218*10^-19*J
ω := 500*2*π*sec^-1
# Merlin Gd chopper:
R_ch := 5*mm
H_ch := 0.2*mm
ρ := 10^6*m
γ := ω*R_ch^2/H_ch = 392.699 m/s
ω = 3141.59 1/s
L := 1 m
L_mod := 10 m
L_det := 2.5*m
L_mon1 := -1.504 + 11.8 + 0.1
L_mon2 := 4.247 + 11.8 + 0.1
L_mon1 = 10.396
h := 6.636*10^-34*m^2*kg/s
m_n := 1.675*10^-27*kg
ε_beg := 150
ε_end := 11
Δt := R_ch/γ
Δt = 1.27324e-5 s
v(ε) := sqrt(2*1.60218*10^-22*J/m_n*ε)
v(ε_end) = 1450.64 m/s
τ_e(ε, L) := L*ω*R_ch/(v(ε)*H_ch)
v(ε_beg) = 5356.84 m/s
τ_e(151.9276, L_mon1*m) = 151.452
# Resolution by '0' energy level:
Δε(ε) := ε*2*Δt*v(ε)/L_det
Δε(ε_beg) = 8.18465
Δε(ε_end) = 0.162537
2*Δt*v(ε_beg)/L_det = 0.0545643
2*Δt*v(ε_end)/L_det = 0.0147761
f_ch(v, τ, t_m) :=
    gm ← 4*R_ch/v
    return 0 if gm > 4
    otherwise
        ff ← 1 - v/(4*R_ch)*(2*R_ch/v + |τ - t_m|)^2
        if gm ≥ 1 and gm ≤ 4
            return 0 if ff < 0
            return ff otherwise
        otherwise
            f1 ← 1 - 2*|τ - t_m|
            return 0 if f1 < 0
            otherwise
                return ff if f1 > 1 - 4*R_ch/v
                return f1 otherwise
cut(data, E_min, E_max, E_i) :=
    np ← length(data[:, 0])
    ic ← 0
    for i ∈ 0 .. np - 1
        if data[i, 0] ≥ E_min and data[i, 0] ≤ E_max
            rez[ic, 0] ← data[i, 0] - E_i
            rez[ic, 1] ← data[i, 1]
            ic ← ic + 1
    return rez
expand(data, st, E_min, E_max) :=
    Np ← floor((E_max - E_min)/st) + 1
    ns ← length(data[:, 0])
    for i ∈ 0 .. Np
        e ← E_min + st*i
        rez[i, 0] ← e
        rez[i, 1] ← 0 if e < data[0, 0] or e > data[ns - 1, 0]
        rez[i, 1] ← linterp(data[:, 0], data[:, 1], e) otherwise
    return rez
transpose(x, shift, L) :=
    Np ← length(x)
    for i ∈ 0 .. Np - 1
        x[i] ← x[i] - shift
        x[i] ← x[i] + L if x[i] < L/2
        x[i] ← x[i] - L if x[i] > L/2
    return x
# Investigating pulse time widening to estimate what width is responsible for moderator widening and which one -- for the energy spread
# [component: outputs tof_mon]
extract_m(mon_info, det_id) :=
    np ← length(mon_info[:, 0])
    ic ← 0
    for i ∈ 0 .. np - 1
        if mon_info[i, 1] == det_id
            rez[ic, 0] ← mon_info[i, 0]*10^-6*sec/Δt
            rez[ic, 1] ← mon_info[i, 2]
            rez[ic, 2] ← mon_info[i, 3]
            ic ← ic + 1
    return rez
t_mon1 := extract_m(tof_mon, 69634)
t_mon_1 := extract_m(tof_mon, 69635)
t_mon_2 := extract_m(tof_mon, 69636)
t_mon_3 := extract_m(tof_mon, 69635)
t_mon1 := (t_mon1 + t_mon_1 + t_mon_3)/3
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t_mon0 := extract_m(tof_mon, 69638)
t.mon1 := extract_m(tof_mon, 69639)
t.mon2 := extract_m(tof_mon, 69640)
t_mon3 := extract_m(tof_mon, 69641)
t_mon2 := (t_mon0 + t.mon1 + t.mon2 + t_mon3)/4
(1.07*10^-3*sec)/Δt = 84.0376
t_mon2[:, 0] := transpose(t_mon2[:, 0], (1.07*10^-3*sec)/Δt, 0.2*sec/Δt)  # disabled
2994.5 - 1924.5 = 1070
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En := [152.4767, 65.2103, 35.7943, 22.52585, 15.479; 0, 0, 0, 0, 0]
v(ε) := sqrt(2*1.60218*10^-22*J/m_n*ε)
τ(L, ε) := L*m/Δt*sqrt(m_n/(2*ε*1.60218*10^-22*J))  # τ in mksec/Dt
τ_pe(en) :=
    Np ← cols(en) - 1
    for i ∈ 0 .. Np
        rez[0, i] ← τ(L_mon1, en[0, i])
        rez[1, i] ← τ(L_mon2, en[0, i])
        rez[2, i] ← en[1, i]
    return rez
tt := 1926.638*10^-6*sec/Δt = 151.318
τ(L_mon1, 151.9277) = 151.452
τ_peaks := τ_pe(En)
τ_peaks[0, 1] = 231.172
τ_peaks = [
    151.179, 231.172, 312.023, 393.326, 474.484;
    234.81, 359.055, 484.631, 610.911, 736.965;
    0, 0, 0, 0, 0
]
τ_peaks[1, 1] = 359.055
normalize(z) :=
    Nrm ← (z[1, 0] - z[0, 0])*sum(z[:, 1])
    z[:, 1] ← z[:, 1]/Nrm
    return z
propagate(τ_peaks, tm1, tm2) :=
    nInt ← cols(τ_peaks) - 1
    for i ∈ 0 .. nInt
        ic ← 0
        t_min ← τ_peaks[0, i]*0.95
        t_max ← τ_peaks[0, i]*1.05
        for j ∈ 0 .. rows(tm1) - 1
            tt ← tm1[j, 0]
            if tt ≥ t_min and tt ≤ t_max
                V ← L_mon1/tt
                t_p ← tt + (τ_peaks[1, i] - τ_peaks[0, i]) - τ_peaks[2, i]
                rz[ic, 0] ← t_p
                rz[ic, 1] ← tm1[j, 1]
                rz[ic, 2] ← tm1[j, 2]
                ic ← ic + 1
        rz ← normalize(rz)
        rez[i*2] ← rz
        ic ← 0
        t_min ← τ_peaks[1, i]*0.95
        t_max ← τ_peaks[1, i]*1.05
        for j ∈ 0 .. rows(tm2) - 1
            tt ← tm2[j, 0]
            if tt ≥ t_min and tt ≤ t_max
                ry[ic, 0] ← tt
                ry[ic, 1] ← tm2[j, 1]
                ry[ic, 2] ← tm2[j, 2]
                ic ← ic + 1
        ry ← normalize(ry)
        rez[2*i + 1] ← ry
    rez
t_shift := (L_mon2 - L_mon1)/V
exp_pls := propagate(τ_peaks, t_mon1, t_mon2)
transpose(exp_pls) = [[
    227.32, 0.000397445, 2;
    227.398, 0.00072865, 2.70211;
    227.477, 0.000662409, 2.55228;
    227.555, 0.000596168, 2.44949;
    227.634, 0.000695529, 2.63299;
    227.712, 0.000529927, 2.29966;
    227.791, 0.000596168, 2.43352;
    227.87, 0.000563048, 2.37263;
    227.948, 0.00072865, 2.70664;
    228.027, 0.000563048, 2.37835
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], [
    223.092, 0.000350797, 1.82313;
    223.171, 0.000257251, 1.60355;
    223.249, 0.000210478, 1.24203;
    223.328, 0.000280638, 1.71958;
    223.407, 0.000350797, 1.91257;
    223.485, 0.000140319, 1.03657;
    223.564, 0.000257251, 1.60355;
    223.642, 0.000140319, 1.03657;
    223.721, 0.000280638, 1.67504;
    223.799, 0.000210478, 1.46958
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], [
    347.519, 0.000246082, 2.06806;
    347.598, 0.000208223, 1.90006;
    347.676, 3.78588e-5, 0.471405;
    347.755, 0.000227153, 1.96212;
    347.833, 0.000170364, 1.54858;
    347.912, 0.000170364, 1.73205;
    347.991, 0.000151435, 1.48316;
    348.069, 1.89294e-5, 0.333333;
    348.148, 0.000359658, 2.50919;
    348.226, 0.000151435, 1.60948
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], [
    341.138, 4.52331e-5, 0.853553;
    341.216, 3.39249e-5, 0.603553;
    341.295, 3.39249e-5, 0.603553;
    341.373, 1.13083e-5, 0.25;
    341.452, 4.52331e-5, 0.707107;
    341.53, 0, 0;
    341.609, 3.39249e-5, 0.433013;
    341.687, 2.26166e-5, 0.5;
    341.766, 4.52331e-5, 0.853553;
    341.845, 2.26166e-5, 0.5
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], [
    469.057, 6.27229e-5, 1;
    469.136, 0.000167261, 1.62611;
    469.214, 6.27229e-5, 1;
    469.293, 4.18153e-5, 0.471405;
    469.372, 4.18153e-5, 0.666667;
    469.45, 0.000292707, 2.14983;
    469.529, 0.000167261, 1.48316;
    469.607, 4.18153e-5, 0.666667;
    469.686, 0.000125446, 1.33333;
    469.764, 0.000188169, 1.73205
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], [
    460.44, 1.50091e-5, 0.25;
    460.518, 1.50091e-5, 0.25;
    460.597, 4.50272e-5, 0.75;
    460.675, 1.50091e-5, 0.25;
    460.754, 4.50272e-5, 0.75;
    460.832, 4.50272e-5, 0.75;
    460.911, 7.50454e-5, 0.75;
    460.989, 1.50091e-5, 0.25;
    461.068, 4.50272e-5, 0.603553;
    461.147, 3.00182e-5, 0.5
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], [
    591.317, 0.000127734, 0.942809;
    591.395, 0.000159668, 1.24402;
    591.474, 0.000159668, 1.24402;
    591.553, 0.000159668, 0.745356;
    591.631, 3.19336e-5, 0.333333;
    591.71, 0.000159668, 1.27614;
    591.788, 0.000319336, 1.80474;
    591.867, 6.38672e-5, 0.666667;
    591.945, 0.000191601, 1.33333;
    592.024, 0.000287402, 1.66667
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], [
    580.37, 0, 0;
    580.449, 3.15329e-5, 0.25;
    580.527, 0, 0;
    580.606, 6.30658e-5, 0.353553;
    580.684, 9.45988e-5, 0.75;
    580.763, 3.15329e-5, 0.25;
    580.841, 0, 0;
    580.92, 3.15329e-5, 0.25;
    580.998, 6.30658e-5, 0.5;
    581.077, 0, 0
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], [
    713.261, 0.000107882, 0.666667;
    713.339, 0, 0;
    713.418, 0.000377585, 1.48803;
    713.496, 0.000269704, 1.27614;
    713.575, 0.000215763, 1.13807;
    713.653, 0.000215763, 0.666667;
    713.732, 0.000215763, 1.13807;
    713.81, 0.000107882, 0.666667;
    713.889, 0.000107882, 0.666667;
    713.968, 0.000107882, 0.666667
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], [
    700.143, 0, 0;
    700.222, 0, 0;
    700.3, 0, 0;
    700.379, 6.37947e-5, 0.25;
    700.457, 0, 0;
    700.536, 6.37947e-5, 0.25;
    700.614, 0, 0;
    700.693, 0, 0;
    700.772, 0, 0;
    700.85, 0, 0
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]]
pt1 := exp_pls[0]
pc1 := exp_pls[1]
pt2 := exp_pls[2]
pc2 := exp_pls[3]
(pt1[1, 0] - pt1[0, 0])*sum(pt1[:, 1]) = 1
pt3 := exp_pls[4]
pc3 := exp_pls[5]
pt4 := exp_pls[6]
pc4 := exp_pls[7]
pt5 := exp_pls[8]
pc5 := exp_pls[9]
(pc1[1, 0] - pc1[0, 0])*sum(pc1[:, 1]) = 1
τ_e(En[0, 0], L_mod) = 145.42
f_ch(v(En[0, 0])*Δt, pc1[0, 0], τ_peaks[1, 1]) = 0
ip1 := 0 .. length(pt1[:, 0]) - 1
ip2 := 0 .. length(pt1[:, 1]) - 1
τ_peaks[1, 0] = 234.81
τ_peaks[1, 1] = 359.055
# [area: Monitors spectra]
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ip3 := 0 .. length(pt3[:, 1]) - 1
ip4 := 0 .. length(pt4[:, 1]) - 1
τ_peaks[1, 2] = 484.631
τ_peaks[1, 3] = 610.911
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ip5 := 0 .. length(pt5[:, 1]) - 1
τ_peaks[1, 4] = 736.965
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# ------------------------------------------------------------------------------------------------------------------------------------------------------------------------------
# [component: outputs ChIn]
# [component: inputs (ChIn[:, 0], ChIn[:, 1], ChIn[:, 2])]
t_min := min(ChIn[:, 1])
t_min = 0.166667
t_max := max(ChIn[:, 1])
t_max = 129.567
get_chunk(data, np0) :=
    (λ ← data[np0, 0])
    ic ← 0
    for i ∈ np0 .. length(data[:, 0]) - 1
        λi ← data[i, 0]
        if λi == λ
            rez[ic, 0] ← data[i, 0]
            rez[ic, 1] ← data[i, 1]
            rez[ic, 2] ← data[i, 2]
            rez[ic, 3] ← data[i, 3]
            ic ← ic + 1
        return rez otherwise
    return rez
ch1 := get_chunk(ChIn, 1050)
reshape(mat, nc, nx, ny) :=
    for i ∈ 0 .. nx - 1
        for j ∈ 0 .. ny - 1
            ind ← j + ny*i
            rez[j, i] ← mat[ind, nc]
    rez
remeshPulse(data, Np) :=
    t_min ← min(data[:, 1])
    t_max ← max(data[:, 1])
    λ_min ← min(data[:, 0])
    λ_max ← max(data[:, 0])
    dt ← (t_max - t_min)/(Np - 1)
    dλ ← (λ_max - λ_min)/(Np - 1)
    for ii ∈ 0 .. Np - 1
        ti[ii] ← t_min + dt*ii
        li[ii] ← λ_min + dλ*ii
    nc ← 0
    ic ← 0
    while nc < rows(data) - 1
        pls ← get_chunk(data, nc)
        ll[ic] ← pls[0, 0]
        tlmin ← min(pls[:, 1])
        tlmax ← max(pls[:, 1])
        intc ← lspline(pls[:, 1], pls[:, 2])
        inter ← linterp(pls[:, 1], pls[:, 2], ti)
        for i ∈ 0 .. rows(inter) - 1
            inter[i] ← 0 if ti[i] ≤ tlmin or ti[i] ≥ tlmax
        trez[ic] ← inter
        nc ← nc + length(pls[:, 0])
        ic ← ic + 1
    for i ∈ 0 .. Np - 1
        for j ∈ 0 .. ic - 1
            Ft ← trez[j]
            F[j] ← Ft[i]
        intc ← lspline(ll, F)
        inter ← linterp(ll, F, li)
        rez ← inter if i == 0
        rez ← augment(rez, inter) otherwise
    out[0] ← li
    out[1] ← ti
    out[2] ← rez
    return out
cut_pulse(pm, Len, t_min, t_max, Np) :=
    l_to_v ← h/(m_n*10^-8*cm)
    v_char ← Len*m/Δt
    Δt ← (t_max - t_min)/(Np - 1)
    λ_ar ← pm[0]
    t_ar ← pm[1]
    ts_min ← min(t_ar)
    ts_max ← max(t_ar)
    V_max ← l_to_v/(min(λ_ar)*v_char)
    V_min ← l_to_v/(max(λ_ar)*v_char)
    for i ∈ 0 .. Np - 1
        τ[i] ← t_min + i*Δt
        t_rg_min ← τ[i] - 1/V_min
        v_min[i] ← 1/(τ[i] - ts_min) if t_rg_min < ts_min
        v_min[i] ← V_min otherwise
        t_rg_max ← τ[i] - 1/V_max
        v_max[i] ← 1/(τ[i] - ts_max) if t_rg_max > ts_max
        v_max[i] ← V_max otherwise
    vf_min ← min(v_min)
    vf_max ← max(v_max)
    Δv ← (vf_max - vf_min)/(Np - 1)
    for i ∈ 0 .. Np - 1
        v[i] ← vf_min + Δv*i
    Mxy ← augment(t_ar, λ_ar)
    spc ← lspline(Mxy, pm[2])
    for i ∈ 0 .. Np - 1
        ic ← 0
        for j ∈ 0 .. Np - 1
            vl ← v[j]
            if vl ≥ v_min[i] and vl ≤ v_max[i]
                tit[ic] ← τ[i]
                vit[ic] ← vl
                ic ← ic + 1
        if ic > 0
            ic ← 0
            for j ∈ 0 .. Np - 1
                if v[j] ≥ v_min[i] and v[j] ≤ v_max[i]
                    rez[i, j] ← interp(spc, Mxy, pm[2], [tit[ic]; vit[ic]])
                    ic ← ic + 1
                rez[i, j] ← 0 otherwise
        otherwise
            for j ∈ 0 .. Np - 1
                rez[i, j] ← 0
    return rez
pls := remeshPulse(ChIn, 400)  # disabled
λ := 2.864
Len := 10
v := h/(m_n*λ*10^-8*cm)
v = 1383.31 m/s
(Len*m*m_n)*10^-8*cm/(h*Δt)*2 = 396.486  # delay time
# [component: outputs Sp150]
# [component: outputs SpEi36]
Sp150[:, 0] := Sp150[:, 0] - 151.36
# [component: outputs Sp65]
# [component: outputs SpEi64]
Sp65[:, 0] := Sp65[:, 0] - 64.356
# [component: outputs SpEi150]
Sp65 := normalize(Sp65)
Sp150 := normalize(Sp150)
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# high frequency filter for spectra:
ε_Res := 10^-7
filt(I, R, Nf) :=
    np ← length(I)
    cent ← np/2
    for i ∈ 0 .. np - 1
        rez[i] ← 0 if |i - cent| < Nf
        otherwise
            rez[i] ← 0 if |R[i]| < ε_Res
            rez[i] ← I[i]/(R[i] + ε_Res) otherwise
expand1(s, Np, L) :=
    x_min ← min(s[:, 0])
    x_max ← max(s[:, 0])
    δL ← 2*L/(Np - 1)
    for i ∈ 0 .. Np - 1
        rez[i, 0] ← -L + δL*i
        rez[i, 1] ← 0 if (rez[i, 0] < x_min) or rez[i, 0] > x_max
        rez[i, 1] ← linterp(s[:, 0], s[:, 1], rez[i, 0]) otherwise
    return rez
i := 0 .. 300 - 1
Si150 := expand1(SpEi150, 300, 30)
Ri150 := expand1(Sp150, 300, 30)
I150_ω := cfft(Si150[:, 1])
R150_ω := cfft(Ri150[:, 1])
I65_ω := cfft(SpEi64[:, 1])
R65_ω := cfft(Sp65[:, 1])
a150 := filt(I150_ω, R150_ω, 115)
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IR_150 := 1/sqrt(π)*icfft(a150)
Si150[:, 0] := transpose(Si150[:, 0], 30, 60)
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# [component: outputs Tof150]
Tof150 := normalize(Tof150)
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τ_pe(en, L) :=
    Np ← cols(en) - 1
    for i ∈ 0 .. Np
        rez[0, i] ← τ(L, en[0, i])
        rez[1, i] ← en[1, i]
    return rez
