k_b := 1.38064852 × 10-23 m2 kg s-2 K-1  # error: This number contains an invalid character ' '.
h := 6.636*10^-34*m^2*kg/s
m_n := 1.675*10^-27*kg
# Atomic units length (born)
k_b := 1.38064852*10^-23*J/K
a_0 = 5.29177e-11 m
# Fe lattice constant:
1/6 = 0.166667
5.27*a_0 = 2.78876e-10 m
γ := 2*π*600/0.2*25
m_e := 9.109*10^-31*kg
eV := 1.60218*10^-19*J
mEv := 10^-3*eV
Ry := 1.36*10^4*mEv
2.84/2.789 = 1.01829
γ*4 = 1884956
# eV -- resonance value for Fe in 001 direction (6
# wavelength-es)
41/400 = 0.1025
359*10^-3
γ = 471239
ε := 32
807*10^-3  # eV -- resonance value for Fe in 001 direction (9 wavelength-es)
7/800 = 0.00875
1435*10^-3  # eV -- resonance value for Fe in 001 direction (12 wavelength-es)
32/1371 = 0.0233406
v := sqrt(2*1.60218*10^-22*J/m_n*ε)
θ := 120 °
sin(θ) = 0.866025
Angstrom = 1e-10 m
λ := h/(m_n*v)
k := 2*π*m/(h*10^10)*sqrt(ε*m_n*2*1.60218*10^-22*J)
k = 3.92398
v = 2474.22 m/s
k_τ := k*sin(θ)
k_τ = 3.39826
λ = 1.60123 Angstrom
1/λ = 0.62452 1/Angstrom
k_1 := sqrt(ε/2.072) = 3.92989
ε(λ) := h^2/(2*(2*1.60218*10^-22*J*m_n*λ^2))
2.87*Angstrom/λ = 1.79237
k = 3.92398
tt := 0.4*m/v
t0 := 2.5 m/v
t0 = 0.00101042 s
ε(4*Angstrom) = 2.56393
1/(2.87*sqrt(2)) = 0.246379
1/2.87 = 0.348432
1/(2.87*2) = 0.174216
sqrt(1000/2.072) = 21.9687
tt = 0.000161667 s
sqrt(2*1.60218*10^-22*J/m_n) = 437.384 m/s
tt/t0 = 0.16
# the coefficient of transformation from root of energy in mEv to wavevector in A^-1
m_n*v^2*10^3/(2*(1.60218*10^-19)*J) = 32
h*10^10*1/m/sqrt(m_n*2*1.60218*10^-22*J) = 9.05792
C_k := 2*π/h*sqrt(m_n*2*1.60218*10^-22*J)*m/10^10
81.81/(2*π)^2 = 2.07227
C_k = 0.693668
m_n*10^3/(2*(1.60218*10^-19)*J) = 5.22725e-6 s^2/m^2
sqrt(1/2.702) = 0.608355
1*eV/k_b = 11604.5 K
h/(m_n*10^-10*m) = 3961.79 m/s
1*V = 1 V
μ := e*h/(2*c*m_e)
μ = 3.30278e-12 m
8*K*k_b = 0.000689385 eV
Δt := (4400 - 2844)*μs
L := (4.2470 + 1.5)*m
E := m_n/(2*eV*10^-3)*(L/Δt)^2
k_b/(10^-3*eV) = 0.0861731 1/K
E = 71.3077
Δt := (4400 - 2822)*μs
L := (4.2470 + 1.5)*m
E := m_n/(2*eV*10^-3)*(L/Δt)^2
E = 69.3333
12.64*10^-3*Ry = 171.904 mEv
# Energy loss for a neutron reflected from a gas of non-connected atoms as a function of scattering angle
Li := 7
μ_n := 1/10
Al := 27
F(v, x) := v^2 - 2*μ_n*cos(x)/(1 + μ_n)*v + (μ_n - 1)/(1 + μ_n)
Np := 200
i := 0 .. Np
v_m(t) := μ_n*cos(t)/(1 + μ_n)
θ[i] := i*(π - 0.001)/Np
# v_refl is relative to initial velocity the velocity of a reflected particle as function of reflection angle
v_refl(t, μ) := (μ*cos(t) + sqrt(1 - μ^2*sin(t)^2))/(1 + μ)
v1_refl(t, μ) := (μ*cos(t) - sqrt(1 - μ^2*sin(t)^2))/(1 + μ)
V[i] := v_refl(θ[i], μ_n)
v_refl(π/2, μ_n) = 0.904534
V1[i] := v1_refl(θ[i], μ_n)
U(θ, v) := μ_n*sqrt(1 + v^2 - 2*v*cos(θ))
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E_0 := 0.5*eV
q_0 := 2*π*sqrt(2*E_0*m_n)/h
q_0 = 15.5109 1/Angstrom
# V0^2-V1^2 = 2*DE
Q(θ, v) := q_0*Angstrom*sqrt(1 + v^2 - 2*v*cos(θ))
ΔE(t, μ) := E_0/(0.001*eV)*(1 - v_refl(t, μ)^2)/2
ΔE1(t, μ) := E_0/(0.001*eV)*(1 - v1_refl(t, μ)^2)/2
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μ_1 := 1/2
μ_2 := 1/27
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