h := 6.636*10^-34*m^2*kg/s
m_n := 1.675*10^-27*kg
k_b := 1.38064852*10^-23*J/K
eV := 1.60218*10^-19*J
η(x) :=
    0 if x < 0
    1 otherwise
Σ := 1.6*cm^-1*(10^-6*sec)*sqrt(2*eV/m_n)
Σ = 2.21301
β := 1/24.1
R1 := 0.5
v(ε) := 10^-6*sec*sqrt(2*ε*eV/m_n)
v(100) = 0.138313 m
# ---------------------------------------------------------------------------------------------------------------------------
a_1 := 10
σ_1 := 0.5
v_1 := 10
a_2 := 15
σ_2 := 2
x_2 := 25
a_3 := 10
σ_3 := 5
x_3 := 35
f(v) := a_1/(sqrt(2*π)*σ_1)*e^(-|(v - v_1)/(2*σ_1)|) + a_2/(sqrt(2*π)*σ_2)*e^(-(v - x_2)^2/(2*σ_2^2)) + a_3/(sqrt(2*π)*σ_3)*e^(-(v - x_3)^2/(2*σ_3^2))
T := 200
N_s := 600
Δ := T/(N_s - 1)
i := 0 .. N_s - 1
τ_1 := 4
τ_2 := 0.1
t[i] := i*Δ
R(τ) :=
    return 0 if τ < 0
    return τ^2*e^(-τ/τ_1)/τ_1*((1 - R1) + R1/(τ_2 + τ_1)*e^(-τ/τ_2)) otherwise
fi[i] := f(t[i])
Norm := integral(R(u), u = 0 .. ∞)
Norm = 16.0001
Norm := 1  # disabled
fr[i] := 1*R(t[i])
L_2 := 180
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fm(x) := 1*(integral(f(u)*R(x - L_2/u), u = 0.001 .. v_1) + integral(f(u)*R(x - L_2/u), u = v_1 .. v_1 + 3*σ_1) + integral(f(u)*R(x - L_2/u), u = v_1 + 3*σ_1 .. x_2) + integral(f(u)*R(x - L_2/u), u = x_2 .. x_3) + integral(f(u)*R(x - L_2/u), u = x_3 .. ∞))
I[i] := fm(t[i])
I_tot := Δ*sum(I[i], i)
I_tot = 655.309
Δ*sum(fr[i], i) = 16
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I_ω := cfft(I)
R_ω := cfft(fr)
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I_ω[0] = 80.1249
R_ω[0] = 1.95633
# high frequency filter for spectra:
if(|n - 50| < 40, 0, D[n])
ε_Res := 10^-9
filt(I, R, Nf) :=
    np ← length(I)
    cent ← np/2
    for i ∈ 0 .. np - 1
        rez[i] ← 0 if |i - cent| < Nf
        otherwise
            rez[i] ← 0 if |R[i]| < ε_Res
            rez[i] ← I[i]/(R[i] + ε_Res) otherwise
If1 := 1*filt(I_ω, R_ω, 0)
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Δ_τ := π/(N_s - 1)
Ifr := 1/(Δ*sqrt(N_s))*icfft(If1)
τ[i] := -π/2 + Δ_τ*i
tr[i] := (τ[i] + π/2)*T/π
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