h := 6.636*10^-34*m^2*kg/s
m_n := 1.675*10^-27*kg
k_b := 1.38064852*10^-23*J/K
eV := 1.60218*10^-19*J
η(x) :=
    0 if x < 0
    1 otherwise
Σ := 1.6*cm^-1*(10^-6*sec)*sqrt(2*eV/m_n)
Σ = 2.21301
β := 1/24.1
R1 := 0.5
f(x, ε) := η(x)*Σ^(3/2)*ε^(3/2)*x^2*e^(-Σ*sqrt(ε)*x)*((1 - R1) + R1*β*e^(-β*x))
fs(x) := f(x, 100) + f(x, 50)
x := 0, 0.01 .. 1
v(ε) := 10^-6*sec*sqrt(2*ε*eV/m_n)
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v(100) = 0.138313 m
L := 0.06*m
fp(x) := f(x - (L/v(50) - L/v(100)), 100) + f(x, 50)
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Np := 800
i := 0 .. Np - 1
L1 := 2
δL := L1/Np
xx[i] := -L1/2 + δL*i
fs1[i] := f(xx[i], 100)
fs2[i] := f(xx[i], 50)
fS[i] := fp(xx[i])
s1 := cfft(fs1)
s2 := cfft(fs2)
ss := cfft(fS)
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fSr := icfft(ss)
sS[i] := s1[i]*(1*e^(2*π/L1*1i*i*(L/v(50) - L/v(100))) + 0) + s2[i]
fm := icfft(sS)
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# ---------------------------------------------------------------------------------------------------------------------------
a_1 := 10
σ_1 := 0.5
x_1 := 10
a_2 := 15
σ_2 := 2
x_2 := 25
a_3 := 10
σ_3 := 5
x_3 := 35
f(x) := a_1/(sqrt(2*π)*σ_1)*e^(-|(x - x_1)/(2*σ_1)|) + a_2/(sqrt(2*π)*σ_2)*e^(-(x - x_2)^2/(2*σ_2^2)) + a_3/(sqrt(2*π)*σ_3)*e^(-(x - x_3)^2/(2*σ_3^2))
L := 120
N := 320
Δ := L/(N - 1)
i := 0 .. N - 1
τ_1 := 1
τ_2 := 0.1
t[i] := -L/2 + i*Δ
R(τ) :=
    return 0 if τ < 0
    return τ^2*e^(-τ/τ_1)/τ_1*((1 - R1) + R1/(τ_2 + τ_1)*e^(-τ/τ_2)) otherwise
fi[i] := f(t[i])
fr[i] := R(t[i])*10
L_1 := 120
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fm(x) := integral(f(τ)*R(x - L_1/τ), τ = 0.1 .. x_1) + integral(f(τ)*R(x - L_1/τ), τ = x_1 .. x_1 + 3*σ_1) + integral(f(τ)*R(x - L_1/τ), τ = x_1 + 3*σ_1 .. x_2) + integral(f(τ)*R(x - L_1/τ), τ = x_2 .. x_3) + integral(f(τ)*R(x - L_1/τ), τ = x_3 .. ∞)
I[i] := fm(t[i])
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I_ω := cfft(I)
R_ω := cfft(fr)
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# high frequency filter for spectra:
if(|n - 50| < 40, 0, D[n])
ε_Res := 10^-7
filt(I, R, Nf) :=
    np ← length(I)
    cent ← np/2
    for i ∈ 0 .. np - 1
        rez[i] ← 0 if |i - cent| < Nf
        otherwise
            rez[i] ← 0 if |R[i]| < ε_Res
            rez[i] ← I[i]/(R[i] + ε_Res) otherwise
If1 := filt(I_ω, R_ω, 0)
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Ifr := 1/sqrt(0.5)*icfft(If1)
u[i] := L_1/(N - 1)*i
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