h := 6.636*10^-34*m^2*kg/s
m_n := 1.6749*10^-27*kg
k_b := 1.38064852*10^-23*J/K
eV := 1.60218*10^-19*J
ω := 500*2*π*sec^-1
# Merlin Gd chopper:
R_ch := 5*mm
H_ch := 0.2*mm
ρ := 10^6*m
γ := ω*R_ch^2/H_ch = 392.699 m/s
ω = 3141.59 1/s
# MERLIN distances (counted from moderator)
L_2 := 2.5*m
L_chop := 10 m
L_samp := 11.8*m
L_det := L_2 + L_samp  # Assuming L_chop=L_Ei_mon1
ε_beg := 150
ε_end := 11  # Chopper opening time:
Δt := R_ch/γ
Δt = 1.27324e-5 s
v(ε) := sqrt(2*1.60218*10^-22*J/m_n*ε)
v(ε_end) = 1450.68 m/s  # TOF for energy ε at the positon L in chopper opening time units:
τ_e(ε, L) := L*ω*R_ch/(v(ε)*H_ch)
v(ε_beg) = 5357 m/s
τ_e(151.9276, L_chop) = 145.678
V_char := (L_det - L_samp)/Δt
V_char = 196350 m/s
N_p := 1000
V_sc := v(ε_beg)/V_char*1000
σ_v := 0.1*V_sc
a_1 := 10
σ_1 := 0.01*V_sc
v_1 := 0
a_2 := 15
σ_2 := 0.05*V_sc
v_2 := 0.2*V_sc
v0 := V_sc
L_v := 3*V_sc
a_3 := 10
σ_3 := 0.1*V_sc
v_3 := 0.5*V_sc
fs(Δv) := a_1/(sqrt(2*π)*σ_1)*e^(-0.5*(Δv/σ_1)^2) + (e^(-(Δv - v_2)^2/(2*σ_2^2)) + 0.5*e^(-(Δv + v_2)^2/(2*σ_2^2)))/(sqrt(2*π)*σ_2)*a_2 + a_3/(sqrt(2*π)*σ_3)*e^(-(Δv - v_3)^2/(2*σ_3^2))
R_v(v, v0) :=
    vp ← v - v0
    return 0 if vp < 0
    otherwise
        vp2 ← vp*vp
        return σ_v^(3/2)*vp2*sqrt(2*π)*e^(-0.5*vp2/(σ_v*σ_v))
fm(v) := integral(R_v(v - δv, v0)*fs(δv), δv = -L_v/2 + v0 .. v0) + integral(R_v(v - δv, v0)*fs(δv), δv = v0 .. L_v/2 + v0)
Δ_v := L_v/(N_p - 1)
i := 0 .. N_p - 1
vf[i] := -L_v/2 + v0 + i*Δ_v
fi[i] := fs(vf[i])
Rf[i] := R_v(vf[i], v0)
fsi[i] := fm(vf[i])
v0 = 27.283
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M(v) :=
    0 if v < -L_v/2 + v0 or v > L_v/2 + v0
    linterp(vf, fsi, v) otherwise
# high frequency filter for spectra:
# high frequency filter for spectra:
if(|n - 50| < 40, 0, D[n])
ε_Res := 1*10^-6
ε_Res := 10^-9
filts(I, R, Nf, Shift) :=
    np ← length(I)
    cent ← np/2
    cutR ← ε_Res*|R[0]|
    for k ∈ 0 .. np - 1
        rez[k] ← 0 if |k - cent| < Nf
        otherwise
            Δs ← e^(2*π*1i*k*Shift) if k < cent
            Δs ← e^(-2*π*1i*k*Shift) otherwise
            rez[k] ← 0 if |R[k]| < cutR
            rez[k] ← I[k]*Δs/(R[k] + ε_Res) otherwise
filt(I, R, Nf) :=
    np ← length(I)
    cent ← np/2
    for i ∈ 0 .. np - 1
        rez[i] ← 0 if |i - cent| < Nf
        otherwise
            rez[i] ← 0 if |R[i]| < ε_Res
            rez[i] ← I[i]/(R[i] + ε_Res) otherwise
# ----------------------------------------------------------------------------------------------------------------------------------------------------------------------------------------
Ib_ω := cfft(fsi)
Rbf_ω := cfft(Rf)
v0/(Δ_v*N_p) = 0.333
τ_1 := 1
τ_2 := 0.1
R1 := 0.5
Sb_ω := filts(Ib_ω, Rbf_ω, 396, 0.5)
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R_t(τ) :=
    return 0 if τ < 0
    return τ^2*e^(-τ/τ_1)/τ_1*((1 - R1) + R1/(τ_2 + τ_1)*e^(-τ/τ_2)) otherwise
t_min := L_2/(R_ch*max(vf))
t_min = 7.33058
L2_p := L_2/R_ch
L_v = 81.849
L2_p = 500
I(t) := integral(R_t(t - L2_p/v)*M(v), v = 0.1 .. L_v/2) + integral(R_t(t - L2_p/v)*M(v), v = L_v/2 .. 3*L_v) + integral(R_t(t - L2_p/v)*M(v), v = 3*L_v .. ∞)
δt := (200 - t_min)/N_p
t[i] := 0.1 + δt*i
If[i] := I(t[i])
R_tt[i] := R_t(t[i])
fbv := 1/(Δ_v*sqrt(N_p))*icfft(Sb_ω)
T := max(t)
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0
I_tω := cfft(If)
R_tω := cfft(R_tt)
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If1 := filt(I_tω, R_tω, 320)
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Δ := T/(N_p - 1)
Ifr := 1/(Δ*sqrt(N_p - 1))*icfft(If1)
tr[i] := Δ*i + 0.001
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v2[i] := L2_p/t[N_p - 1 - i]
M_rr[i] := Ifr[N_p - i - 1]*t[N_p - i - 1]^2/L2_p
max(tr) = 192.578
v_max := max(v2)
v_min := min(v2)
v_max = 5000
v_min = 2.59637
v_min := 2  # disabled
v_max := 100
Npi := 1*N_p
ii := 0 .. Npi - 1
Npi = 1000
Δv := (v_max - v_min)/(Npi - 1)
v_r[ii] := v_min + ii*Δv
length(v_r) = 1000
tr_min := min(tr)
tr_max := max(tr)
Mif(v) :=
    ti ← L2_p/v
    In ← 0 if ti < tr_min or ti > tr_max
    In ← linterp(tr, Ifr, ti) otherwise
    rez ← In*ti^2/L2_p
Mr1[ii] := Mif(v_r[ii])
Rf2[ii] := R_v(v_r[ii], v0)
length(Mr1) = 1000
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I_ω := cfft(Mr1)
R_ω := cfft(Rf2)
sp := 1
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Sr_ω := filts(I_ω, R_ω, 460, 0.5)
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fr := 1/(Δ_v*sqrt(Npi))*icfft(Sr_ω)
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t_min := min(ChIn[:, 1])
t_min =  # error: This variable is undefined.
t_max := max(ChIn[:, 1])
t_max =  # error
get_chunk(data, np0) :=
    (λ ← data[np0, 0])
    ic ← 0
    for i ∈ np0 .. length(data[:, 0]) - 1
        λi ← data[i, 0]
        if λi == λ
            rez[ic, 0] ← data[i, 0]
            rez[ic, 1] ← data[i, 1]
            rez[ic, 2] ← data[i, 2]
            rez[ic, 3] ← data[i, 3]
            ic ← ic + 1
        return rez otherwise
    return rez
ch1 := get_chunk(ChIn, 1050)
reshape(mat, nc, nx, ny) :=
    for i ∈ 0 .. nx - 1
        for j ∈ 0 .. ny - 1
            ind ← j + ny*i
            rez[j, i] ← mat[ind, nc]
    rez
remeshPulse(data, Np) :=
    t_min ← min(data[:, 1])
    t_max ← max(data[:, 1])
    λ_min ← min(data[:, 0])
    λ_max ← max(data[:, 0])
    dt ← (t_max - t_min)/(Np - 1)
    dλ ← (λ_max - λ_min)/(Np - 1)
    for ii ∈ 0 .. Np - 1
        ti[ii] ← t_min + dt*ii
        li[ii] ← λ_min + dλ*ii
    nc ← 0
    ic ← 0
    while nc < rows(data) - 1
        pls ← get_chunk(data, nc)
        ll[ic] ← pls[0, 0]
        tlmin ← min(pls[:, 1])
        tlmax ← max(pls[:, 1])
        intc ← lspline(pls[:, 1], pls[:, 2])
        inter ← linterp(pls[:, 1], pls[:, 2], ti)
        for i ∈ 0 .. rows(inter) - 1
            inter[i] ← 0 if ti[i] ≤ tlmin or ti[i] ≥ tlmax
        trez[ic] ← inter
        nc ← nc + length(pls[:, 0])
        ic ← ic + 1
    for i ∈ 0 .. Np - 1
        for j ∈ 0 .. ic - 1
            Ft ← trez[j]
            F[j] ← Ft[i]
        intc ← lspline(ll, F)
        inter ← linterp(ll, F, li)
        rez ← inter if i == 0
        rez ← augment(rez, inter) otherwise
    out[0] ← li
    out[1] ← ti
    out[2] ← rez
    return out
cut_pulse(pm, Len, t_min, t_max, Np) :=
    l_to_v ← h/(m_n*10^-8*cm)
    v_char ← Len*m/Δt
    Δt ← (t_max - t_min)/(Np - 1)
    λ_ar ← pm[0]
    t_ar ← pm[1]
    ts_min ← min(t_ar)
    ts_max ← max(t_ar)
    V_max ← l_to_v/(min(λ_ar)*v_char)
    V_min ← l_to_v/(max(λ_ar)*v_char)
    for i ∈ 0 .. Np - 1
        τ[i] ← t_min + i*Δt
        t_rg_min ← τ[i] - 1/V_min
        v_min[i] ← 1/(τ[i] - ts_min) if t_rg_min < ts_min
        v_min[i] ← V_min otherwise
        t_rg_max ← τ[i] - 1/V_max
        v_max[i] ← 1/(τ[i] - ts_max) if t_rg_max > ts_max
        v_max[i] ← V_max otherwise
    vf_min ← min(v_min)
    vf_max ← max(v_max)
    Δv ← (vf_max - vf_min)/(Np - 1)
    for i ∈ 0 .. Np - 1
        v[i] ← vf_min + Δv*i
    Mxy ← augment(t_ar, λ_ar)
    spc ← lspline(Mxy, pm[2])
    for i ∈ 0 .. Np - 1
        ic ← 0
        for j ∈ 0 .. Np - 1
            vl ← v[j]
            if vl ≥ v_min[i] and vl ≤ v_max[i]
                tit[ic] ← τ[i]
                vit[ic] ← vl
                ic ← ic + 1
        if ic > 0
            ic ← 0
            for j ∈ 0 .. Np - 1
                if v[j] ≥ v_min[i] and v[j] ≤ v_max[i]
                    rez[i, j] ← interp(spc, Mxy, pm[2], [tit[ic]; vit[ic]])
                    ic ← ic + 1
                rez[i, j] ← 0 otherwise
        otherwise
            for j ∈ 0 .. Np - 1
                rez[i, j] ← 0
    return rez
pls := remeshPulse(ChIn, 400)  # disabled
λ := 2.864
Len := 10
v := h/(m_n*λ*10^-8*cm)
v = 1383.39 m/s
(Len*m*m_n)*10^-8*cm/(h*Δt)*2 = 396.463  # delay time
# [component: outputs Sp150]
# [component: outputs SpEi36]
Sp150[:, 0] := Sp150[:, 0] - 151.36
# [component: outputs Sp65]
# [component: outputs SpEi64]
Sp65[:, 0] := Sp65[:, 0] - 64.356
# [component: outputs SpEi150]
Sp65 := normalize(Sp65)
Sp150 := normalize(Sp150)
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# high frequency filter for spectra:
ε_Res := 10^-7
filt(I, R, Nf) :=
    np ← length(I)
    cent ← np/2
    for i ∈ 0 .. np - 1
        rez[i] ← 0 if |i - cent| < Nf
        otherwise
            rez[i] ← 0 if |R[i]| < ε_Res
            rez[i] ← I[i]/(R[i] + ε_Res) otherwise
expand1(s, Np, L) :=
    x_min ← min(s[:, 0])
    x_max ← max(s[:, 0])
    δL ← 2*L/(Np - 1)
    for i ∈ 0 .. Np - 1
        rez[i, 0] ← -L + δL*i
        rez[i, 1] ← 0 if (rez[i, 0] < x_min) or rez[i, 0] > x_max
        rez[i, 1] ← linterp(s[:, 0], s[:, 1], rez[i, 0]) otherwise
    return rez
i := 0 .. 300 - 1
Si150 := expand1(SpEi150, 300, 30)
Ri150 := expand1(Sp150, 300, 30)
I150_ω := cfft(Si150[:, 1])
R150_ω := cfft(Ri150[:, 1])
I65_ω := cfft(SpEi64[:, 1])
R65_ω := cfft(Sp65[:, 1])
a150 := filt(I150_ω, R150_ω, 115)
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IR_150 := 1/sqrt(π)*icfft(a150)
Si150[:, 0] := transpose(Si150[:, 0], 30, 60)
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# [component: outputs Tof150]
Tof150 := normalize(Tof150)
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τ_pe(en, L) :=
    Np ← cols(en) - 1
    for i ∈ 0 .. Np
        rez[0, i] ← τ(L, en[0, i])
        rez[1, i] ← en[1, i]
    return rez
