h := 6.636*10^-34*m^2*kg/s
m_n := 1.6749*10^-27*kg
k_b := 1.38064852*10^-23*J/K
eV := 1.60218*10^-19*J
ω := 500*2*π*sec^-1
# Merlin Gd chopper:
R_ch := 5*mm
H_ch := 0.2*mm
ρ := 10^6*m
γ := ω*R_ch^2/H_ch = 392.699 m/s
ω = 3141.59 1/s
# MERLIN distances (counted from moderator)
L_chop := 10 m
L_samp := 11.8*m
L_det := 2.5*m + L_samp  # Assuming L_chop=L_Ei_mon1
ε_beg := 150
ε_end := 11  # Chopper opening time:
Δt := R_ch/γ
Δt = 1.27324e-5 s
v(ε) := sqrt(2*1.60218*10^-22*J/m_n*ε)
v(ε_end) = 1450.68 m/s  # TOF for energy ε at the positon L in chopper opening time units:
τ_e(ε, L) := L*ω*R_ch/(v(ε)*H_ch)
v(ε_beg) = 5357 m/s
τ_e(151.9276, L_chop) = 145.678
V_char := (L_det - L_samp)/Δt
V_char = 196350 m/s
N_p := 1000
V_sc := v(ε_beg)/V_char*1000
σ_v := 0.1*V_sc
a_1 := 10
σ_1 := 0.01*V_sc
v_1 := 0
a_2 := 15
σ_2 := 0.05*V_sc
v_2 := 0.2*V_sc
v0 := V_sc
L_v := 3*V_sc
a_3 := 10
σ_3 := 0.2*V_sc
v_3 := 0.5*V_sc
fs(v) := a_1/(sqrt(2*π)*σ_1)*e^(-0.5*(v/σ_1)^2) + (e^(-(v - v_2)^2/(2*σ_2^2)) + 0.5*e^(-(v + v_2)^2/(2*σ_2^2)))/(sqrt(2*π)*σ_2)*a_2 + a_3/(sqrt(2*π)*σ_3)*e^(-(v - v_3)^2/(2*σ_3^2))
R_v(v, v0) :=
    vp ← v - v0
    return 0 if vp < 0
    otherwise
        vp2 ← vp*vp
        return σ_v^(3/2)*vp2*sqrt(2*π)*e^(-0.5*vp2/(σ_v*σ_v))
fm(v) := integral(R_v(τ + v0, v0)*fs(v - τ), τ = -L_v/2 .. 0) + integral(R_v(τ + v0, v0)*fs(v - τ), τ = 0 .. L_v/2)
Δ_v := L_v/(N_p - 1)
i := 0 .. N_p - 1
vf[i] := -L_v/2 + i*Δ_v
fi[i] := fs(vf[i])
Rf[i] := R_v(vf[i] + v0, v0)
fsi[i] := fm(vf[i])
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I_ω := cfft(fsi)
R_ω := cfft(Rf)
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# high frequency filter for spectra:
ε_Res := 8*10^-5
filt(I, R, Nf, Shift) :=
    np ← length(I)
    cent ← np/2
    cutR ← ε_Res*|R[0]|
    for k ∈ 0 .. np - 1
        rez[k] ← 0 if |k - cent| < Nf
        otherwise
            Δs ← e^(-2*π*1i*k*Shift) if k < cent
            Δs ← e^(2*π*1i*k*Shift) otherwise
            rez[k] ← 0 if |R[k]| < cutR
            rez[k] ← I[k]*Δs/(R[k] + ε_Res) otherwise
Sr_ω := filt(I_ω, R_ω, 0, 0.5)
fr := 1/(Δ_v*sqrt(N_p))*icfft(Sr_ω)
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f_ch(v, τ, t_m) :=
    gm ← 4*R_ch/v
    return 0 if gm > 4
    otherwise
        ff ← 1 - v/(4*R_ch)*(2*R_ch/v + |τ - t_m|)^2
        if gm ≥ 1 and gm ≤ 4
            return 0 if ff < 0
            return ff otherwise
        otherwise
            f1 ← 1 - 2*|τ - t_m|
            return 0 if f1 < 0
            otherwise
                return ff if f1 > 1 - 4*R_ch/v
                return f1 otherwise
cut(data, E_min, E_max, E_i) :=
    np ← length(data[:, 0])
    ic ← 0
    for i ∈ 0 .. np - 1
        if data[i, 0] ≥ E_min and data[i, 0] ≤ E_max
            rez[ic, 0] ← data[i, 0] - E_i
            rez[ic, 1] ← data[i, 1]
            ic ← ic + 1
    return rez
expand(data, st, E_min, E_max) :=
    Np ← floor((E_max - E_min)/st) + 1
    ns ← length(data[:, 0])
    for i ∈ 0 .. Np
        e ← E_min + st*i
        rez[i, 0] ← e
        rez[i, 1] ← 0 if e < data[0, 0] or e > data[ns - 1, 0]
        rez[i, 1] ← linterp(data[:, 0], data[:, 1], e) otherwise
    return rez
transpose(x, shift, L) :=
    Np ← length(x)
    for i ∈ 0 .. Np - 1
        x[i] ← x[i] - shift
        x[i] ← x[i] + L if x[i] < L/2
        x[i] ← x[i] - L if x[i] > L/2
    return x
En := [152.4767, 65.2103, 35.7943, 22.52585, 15.479; 0, 0, 0, 0, 0]
v(ε) := sqrt(2*1.60218*10^-22*J/m_n*ε)
τ(L, ε) := L*m/Δt*sqrt(m_n/(2*ε*1.60218*10^-22*J))  # τ in mksec/Dt
τ_pe(en) :=
    Np ← cols(en) - 1
    for i ∈ 0 .. Np
        rez[0, i] ← τ(L_mon1, en[0, i])
        rez[1, i] ← τ(L_mon2, en[0, i])
        rez[2, i] ← en[1, i]
    return rez
tt := 1926.638*10^-6*sec/Δt = 151.318
τ(L_mon1, 151.9277) =  # error: This variable is undefined.
τ_peaks := τ_pe(En)
τ_peaks[0, 1] =  # error
τ_peaks =  # error
τ_peaks[1, 1] =  # error
normalize(z) :=
    Nrm ← (z[1, 0] - z[0, 0])*sum(z[:, 1])
    z[:, 1] ← z[:, 1]/Nrm
    return z
propagate(τ_peaks, tm1, tm2) :=
    nInt ← cols(τ_peaks) - 1
    for i ∈ 0 .. nInt
        ic ← 0
        t_min ← τ_peaks[0, i]*0.95
        t_max ← τ_peaks[0, i]*1.05
        for j ∈ 0 .. rows(tm1) - 1
            tt ← tm1[j, 0]
            if tt ≥ t_min and tt ≤ t_max
                V ← L_mon1/tt
                t_p ← tt + (τ_peaks[1, i] - τ_peaks[0, i]) - τ_peaks[2, i]
                rz[ic, 0] ← t_p
                rz[ic, 1] ← tm1[j, 1]
                rz[ic, 2] ← tm1[j, 2]
                ic ← ic + 1
        rz ← normalize(rz)
        rez[i*2] ← rz
        ic ← 0
        t_min ← τ_peaks[1, i]*0.95
        t_max ← τ_peaks[1, i]*1.05
        for j ∈ 0 .. rows(tm2) - 1
            tt ← tm2[j, 0]
            if tt ≥ t_min and tt ≤ t_max
                ry[ic, 0] ← tt
                ry[ic, 1] ← tm2[j, 1]
                ry[ic, 2] ← tm2[j, 2]
                ic ← ic + 1
        ry ← normalize(ry)
        rez[2*i + 1] ← ry
    rez
t_shift := (L_mon2 - L_mon1)/V
exp_pls := propagate(τ_peaks, t_mon1, t_mon2)
transpose(exp_pls) =  # error
pt1 := exp_pls[0]
pc1 := exp_pls[1]
pt2 := exp_pls[2]
pc2 := exp_pls[3]
(pt1[1, 0] - pt1[0, 0])*sum(pt1[:, 1]) =  # error
pt3 := exp_pls[4]
pc3 := exp_pls[5]
pt4 := exp_pls[6]
pc4 := exp_pls[7]
pt5 := exp_pls[8]
pc5 := exp_pls[9]
(pc1[1, 0] - pc1[0, 0])*sum(pc1[:, 1]) =  # error
τ_e(En[0, 0], L_mod) =  # error
f_ch(v(En[0, 0])*Δt, pc1[0, 0], τ_peaks[1, 1]) =  # error
ip1 := 0 .. length(pt1[:, 0]) - 1
ip2 := 0 .. length(pt1[:, 1]) - 1
τ_peaks[1, 0] =  # error
τ_peaks[1, 1] =  # error
t_min := min(ChIn[:, 1])
t_min =  # error
t_max := max(ChIn[:, 1])
t_max =  # error
get_chunk(data, np0) :=
    (λ ← data[np0, 0])
    ic ← 0
    for i ∈ np0 .. length(data[:, 0]) - 1
        λi ← data[i, 0]
        if λi == λ
            rez[ic, 0] ← data[i, 0]
            rez[ic, 1] ← data[i, 1]
            rez[ic, 2] ← data[i, 2]
            rez[ic, 3] ← data[i, 3]
            ic ← ic + 1
        return rez otherwise
    return rez
ch1 := get_chunk(ChIn, 1050)
reshape(mat, nc, nx, ny) :=
    for i ∈ 0 .. nx - 1
        for j ∈ 0 .. ny - 1
            ind ← j + ny*i
            rez[j, i] ← mat[ind, nc]
    rez
remeshPulse(data, Np) :=
    t_min ← min(data[:, 1])
    t_max ← max(data[:, 1])
    λ_min ← min(data[:, 0])
    λ_max ← max(data[:, 0])
    dt ← (t_max - t_min)/(Np - 1)
    dλ ← (λ_max - λ_min)/(Np - 1)
    for ii ∈ 0 .. Np - 1
        ti[ii] ← t_min + dt*ii
        li[ii] ← λ_min + dλ*ii
    nc ← 0
    ic ← 0
    while nc < rows(data) - 1
        pls ← get_chunk(data, nc)
        ll[ic] ← pls[0, 0]
        tlmin ← min(pls[:, 1])
        tlmax ← max(pls[:, 1])
        intc ← lspline(pls[:, 1], pls[:, 2])
        inter ← linterp(pls[:, 1], pls[:, 2], ti)
        for i ∈ 0 .. rows(inter) - 1
            inter[i] ← 0 if ti[i] ≤ tlmin or ti[i] ≥ tlmax
        trez[ic] ← inter
        nc ← nc + length(pls[:, 0])
        ic ← ic + 1
    for i ∈ 0 .. Np - 1
        for j ∈ 0 .. ic - 1
            Ft ← trez[j]
            F[j] ← Ft[i]
        intc ← lspline(ll, F)
        inter ← linterp(ll, F, li)
        rez ← inter if i == 0
        rez ← augment(rez, inter) otherwise
    out[0] ← li
    out[1] ← ti
    out[2] ← rez
    return out
cut_pulse(pm, Len, t_min, t_max, Np) :=
    l_to_v ← h/(m_n*10^-8*cm)
    v_char ← Len*m/Δt
    Δt ← (t_max - t_min)/(Np - 1)
    λ_ar ← pm[0]
    t_ar ← pm[1]
    ts_min ← min(t_ar)
    ts_max ← max(t_ar)
    V_max ← l_to_v/(min(λ_ar)*v_char)
    V_min ← l_to_v/(max(λ_ar)*v_char)
    for i ∈ 0 .. Np - 1
        τ[i] ← t_min + i*Δt
        t_rg_min ← τ[i] - 1/V_min
        v_min[i] ← 1/(τ[i] - ts_min) if t_rg_min < ts_min
        v_min[i] ← V_min otherwise
        t_rg_max ← τ[i] - 1/V_max
        v_max[i] ← 1/(τ[i] - ts_max) if t_rg_max > ts_max
        v_max[i] ← V_max otherwise
    vf_min ← min(v_min)
    vf_max ← max(v_max)
    Δv ← (vf_max - vf_min)/(Np - 1)
    for i ∈ 0 .. Np - 1
        v[i] ← vf_min + Δv*i
    Mxy ← augment(t_ar, λ_ar)
    spc ← lspline(Mxy, pm[2])
    for i ∈ 0 .. Np - 1
        ic ← 0
        for j ∈ 0 .. Np - 1
            vl ← v[j]
            if vl ≥ v_min[i] and vl ≤ v_max[i]
                tit[ic] ← τ[i]
                vit[ic] ← vl
                ic ← ic + 1
        if ic > 0
            ic ← 0
            for j ∈ 0 .. Np - 1
                if v[j] ≥ v_min[i] and v[j] ≤ v_max[i]
                    rez[i, j] ← interp(spc, Mxy, pm[2], [tit[ic]; vit[ic]])
                    ic ← ic + 1
                rez[i, j] ← 0 otherwise
        otherwise
            for j ∈ 0 .. Np - 1
                rez[i, j] ← 0
    return rez
pls := remeshPulse(ChIn, 400)  # disabled
λ := 2.864
Len := 10
v := h/(m_n*λ*10^-8*cm)
v = 1383.39 m/s
(Len*m*m_n)*10^-8*cm/(h*Δt)*2 = 396.463  # delay time
# [component: outputs Sp150]
# [component: outputs SpEi36]
Sp150[:, 0] := Sp150[:, 0] - 151.36
# [component: outputs Sp65]
# [component: outputs SpEi64]
Sp65[:, 0] := Sp65[:, 0] - 64.356
# [component: outputs SpEi150]
Sp65 := normalize(Sp65)
Sp150 := normalize(Sp150)
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# high frequency filter for spectra:
ε_Res := 10^-7
filt(I, R, Nf) :=
    np ← length(I)
    cent ← np/2
    for i ∈ 0 .. np - 1
        rez[i] ← 0 if |i - cent| < Nf
        otherwise
            rez[i] ← 0 if |R[i]| < ε_Res
            rez[i] ← I[i]/(R[i] + ε_Res) otherwise
expand1(s, Np, L) :=
    x_min ← min(s[:, 0])
    x_max ← max(s[:, 0])
    δL ← 2*L/(Np - 1)
    for i ∈ 0 .. Np - 1
        rez[i, 0] ← -L + δL*i
        rez[i, 1] ← 0 if (rez[i, 0] < x_min) or rez[i, 0] > x_max
        rez[i, 1] ← linterp(s[:, 0], s[:, 1], rez[i, 0]) otherwise
    return rez
i := 0 .. 300 - 1
Si150 := expand1(SpEi150, 300, 30)
Ri150 := expand1(Sp150, 300, 30)
I150_ω := cfft(Si150[:, 1])
R150_ω := cfft(Ri150[:, 1])
I65_ω := cfft(SpEi64[:, 1])
R65_ω := cfft(Sp65[:, 1])
a150 := filt(I150_ω, R150_ω, 115)
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IR_150 := 1/sqrt(π)*icfft(a150)
Si150[:, 0] := transpose(Si150[:, 0], 30, 60)
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# [component: outputs Tof150]
Tof150 := normalize(Tof150)
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τ_pe(en, L) :=
    Np ← cols(en) - 1
    for i ∈ 0 .. Np
        rez[0, i] ← τ(L, en[0, i])
        rez[1, i] ← en[1, i]
    return rez
