x := 0 .. 100
f(x) := e^(-(x - 50)^2/100)
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10/sqrt(2) = 7.07107
v(x) :=
    rez ← 0 if x < 0
    otherwise
        res ← 0 if x > 6
        res ← x otherwise
vi(x) :=
    x_min ← x - 3
    x_max ← x + 3
    x_min ← 0 if x_min < 0
    x_max ← 6 if x_max > 6
    1/(x_max - x_min + 10^-8)*integral(v(y), y = x_min .. x_max)
x := -0 .. 10
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vi(x) = [1.5; 2; 2.5; 3; 3.5; 4; 4.5; 5; 5.5; 0; 0]
x = [0; 1; 2; 3; 4; 5; 6; 7; 8; 9; 10]
ff(x) := 1/(σ*sqrt(2*π))*e^(-(x - x_0)^2/(2*σ^2))  # error: This variable is undefined.
d^2/dy^2(ff(y)) → sqrt(2)*e^(-(x_0 - y)^2/(2*σ^2))*(2*x_0 - 2*y)^2/(8*sqrt(π)*σ^5) - sqrt(2)*e^(-(x_0 - y)^2/(2*σ^2))/(2*sqrt(π)*σ^3) simplify → -sqrt(2)*e^(-(x_0 - y)^2/(2*σ^2))*(σ^2 - x_0^2 + 2*x_0*y - y^2)/(2*sqrt(π)*σ^5)
d^2/dy^2(integral(1/(σ*sqrt(2*π))*e^(-(x - x_0)^2/(2*σ^2)), x = y - Δ .. y + Δ)) → -σ*sqrt(1/σ^2)*(2*e^(-(Δ*sqrt(1/2/σ^2) + x_0*sqrt(1/2/σ^2) - y*sqrt(1/2/σ^2))^2)*(Δ*sqrt(1/(2*σ^2)) + x_0*sqrt(1/(2*σ^2)) - y*sqrt(1/(2*σ^2)))/(sqrt(π)*σ^2) + 2*e^(-(Δ*sqrt(1/2/σ^2) - x_0*sqrt(1/2/σ^2) + y*sqrt(1/2/σ^2))^2)*(Δ*sqrt(1/(2*σ^2)) - x_0*sqrt(1/(2*σ^2)) + y*sqrt(1/(2*σ^2)))/(sqrt(π)*σ^2))/2 simplify → -sqrt(2)*(Δ*e^(-(Δ + x_0 - y)^2/(2*σ^2)) + Δ*e^(-(Δ - x_0 + y)^2/(2*σ^2)) + x_0*e^(-(Δ + x_0 - y)^2/(2*σ^2)) - x_0*e^(-(Δ - x_0 + y)^2/(2*σ^2)) - y*e^(-(Δ + x_0 - y)^2/(2*σ^2)) + y*e^(-(Δ - x_0 + y)^2/(2*σ^2)))/(2*sqrt(π)*σ^3)
d^2/dz^2(integral(integral(1/(σ*sqrt(2*π))*e^(-(x - x_0)^2/(2*σ^2)), x = y - Δ .. y + Δ), y = z - Δ .. z + Δ)) → σ*(2*e^(-(Δ*sqrt(1/2/σ^2) + x_0*sqrt(1/2/σ^2) + (Δ - z)*sqrt(1/2/σ^2))^2)*sqrt(1/(2*σ^2))/sqrt(π) - 2*e^(-(x_0*sqrt(1/2/σ^2) - Δ*sqrt(1/2/σ^2) + (Δ - z)*sqrt(1/2/σ^2))^2)*sqrt(1/(2*σ^2))/sqrt(π))*sqrt(1/σ^2)/2 + σ*sqrt(1/σ^2)*(2*e^(-(sqrt(1/2/σ^2)*(Δ + z) + Δ*sqrt(1/2/σ^2) - x_0*sqrt(1/2/σ^2))^2)*sqrt(1/(2*σ^2))/sqrt(π) - 2*e^(-(Δ*sqrt(1/2/σ^2) - sqrt(1/2/σ^2)*(Δ + z) + x_0*sqrt(1/2/σ^2))^2)*sqrt(1/(2*σ^2))/sqrt(π))/2 simplify → sqrt(2)*(e^(-(2*Δ + x_0 - z)^2/(2*σ^2)) - 2*e^(-(x_0 - z)^2/(2*σ^2)) + e^(-(2*Δ - x_0 + z)^2/(2*σ^2)))/(2*sqrt(π)*σ)
d^2/dz^2(integral(integral(integral(1/(σ*sqrt(2*π))*e^(-(x - x_0)^2/(2*σ^2)), x = y - Δ .. y + Δ), y = z - Δ .. z + Δ), z = t - Δ .. t + Δ)) → 0
-Δ*e^(-(Δ + x_0 - y)^2/(2*σ^2)) + Δ*e^(-(Δ - x_0 + y)^2/(2*σ^2)) + x_0*e^(-(Δ + x_0 - y)^2/(2*σ^2)) - x_0*e^(-(Δ - x_0 + y)^2/(2*σ^2)) - y*e^(-(Δ + x_0 - y)^2/(2*σ^2)) + y*e^(-(Δ - x_0 + y)^2/(2*σ^2)) substitute, (Δ - x_0 + y)^2/(2*σ^2) == A → (e^(-A) - e^(-1/2/σ^2*(Δ + x_0 - y)^2))*(Δ - x_0 + y)
σ := 1
x_0 := 0
Δ := 1
ff(x) := 1/(σ*sqrt(2*π))*e^(-(x - x_0)^2/(2*σ^2))
f1(y) := 1/(σ*sqrt(2*π))*integral(ff(x), x = y - Δ .. y + Δ)
sqrt(2) = 1.41421
f2(y) := 1/(σ*sqrt(2*π))*integral(f1(x), x = y - Δ .. y + Δ)
(Δ*e^(-(Δ + x_0 - y)^2/(2*σ^2)) + Δ*e^(-(Δ - x_0 + y)^2/(2*σ^2)) + x_0*e^(-(Δ + x_0 - y)^2/(2*σ^2)) - x_0*e^(-(Δ - x_0 + y)^2/(2*σ^2)) - y*e^(-(Δ + x_0 - y)^2/(2*σ^2)) + y*e^(-(Δ - x_0 + y)^2/(2*σ^2))) == 0 solve → -1.19967864026
(e^(-(2*Δ + x_0 - z)^2/(2*σ^2)) - 2*e^(-(x_0 - z)^2/(2*σ^2)) + e^(-(2*Δ - x_0 + z)^2/(2*σ^2))) == 0 solve → -1.34426824865
y := -100 .. 100
'
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