x := 0
J_5_111(x) := 2 - 2*cos(π/sqrt(3)*x)^3
J_5_110(x) := 2 - 2*cos(π/sqrt(2)*x)^2
J_5_100(x) := 2 - 2*cos(π*x)
J_1_111(x) := 3*sin(π/sqrt(3)*x)^2
J_1_100(x) := sin(π*x)^2
J_1_110(x) := 2*sin(π/sqrt(2)*x)^2
J_11_110(x) := 3 - cos(2*π/sqrt(2)*x)^2 - 2*cos(2*π/sqrt(2)*x)
J_11_100(x) := 2 - 2*cos(2*π*x)
J_11_111(x) := 3 - 3*cos(2*π/sqrt(3)*x)^2
J_3_100(x) := 2*(3 - 2*cos(π*x) - cos(3*π*x))
J_3_110(x) := 2*(3 - cos(π/sqrt(2)*x)^2 - 2*cos(3*π/sqrt(2)*x)*cos(π/sqrt(2)*x))
J_3_111(x) := 6*(1 - cos(3*π/sqrt(3)*x)*cos(π/sqrt(3)*x)^2)
J_111_100(x) := 2 - 2*cos(2*π*x)
J_111_110(x) := 2 - cos(2*π/sqrt(2)*x)^2*2
J_111_111(x) := 2 - 2*cos(2*π/sqrt(3)*x)^3
# DR expansion  in 100 direction:
M1 := [
    1/2*d^2/dx^2(J_5_100(x)), 1/2*d^2/dx^2(J_1_100(x)), 1/2*d^2/dx^2(J_11_100(x));
    1/4!*(d^4/dx^4(J_5_100(x))), 1/4!*d^4/dx^4(J_1_100(x)), 1/4!*d^4/dx^4(J_11_100(x))
] → [π^2, π^2, 4*π^2; -π^4/12, -π^4/3, -4*π^4/3]
# DR expansion  in 110 direction:
M2 := [
    1/2*d^2/dx^2(J_5_110(x)), 1/2*d^2/dx^2(J_1_110(x)), 1/2*d^2/dx^2(J_11_110(x));
    1/4!*(d^4/dx^4(J_5_110(x))), 1/4!*d^4/dx^4(J_1_110(x)), 1/4!*d^4/dx^4(J_11_110(x))
] → [π^2, π^2, 4*π^2; -π^4/6, -π^4/6, -5*π^4/3]
# DR expansion  in 111 direction:
M3 := [
    1/2*d^2/dx^2(J_5_111(x)), 1/2*d^2/dx^2(J_1_111(x)), 1/2*d^2/dx^2(J_11_111(x));
    1/4!*(d^4/dx^4(J_5_111(x))), 1/4!*d^4/dx^4(J_1_111(x)), 1/4!*d^4/dx^4(J_11_111(x))
] → [π^2, π^2, 4*π^2; -7*π^4/36, -π^4/9, -16*π^4/9]
rank(M1) = 2
rank(M2) = 2
rank(M3) = 2
# Matrix to get j0,j1,j2 from power 4 polynomial fitting:
det([9.87, 19.739, 78.957; -97.409, -779.273, -3.117*10^3; 961.389, 3.076*10^4, 1.231*10^5]) = -374553
svd2([π^2/2, π^2, 4*π^2; -π^4/24, -π^4/3, -4*π^4/3; π^6/720, 2*π^6/45, 8*π^6/45]) = [
    [225.022; 4.8629; 0]; [0.181233, 0.852627, 0.490084; -0.595184, -0.301616, 0.744838; 0.782886, -0.426679, 0.452807]; [0.0193554, 0.24249, 0.969961; 0.999813, -0.00469437, -0.0187775; 0, 0.970143, -0.242536]
]
MS := [
    1/2*d^2/dx^2(J_5_100(x)), 1/2*d^2/dx^2(J_1_100(x)), 1/2*d^2/dx^2(J_11_100(x));
    1/4!*(d^4/dx^4(J_5_100(x))), 1/4!*d^4/dx^4(J_1_100(x)), 1/4!*d^4/dx^4(J_11_100(x));
    1/2*d^2/dx^2(J_5_110(x)), 1/2*d^2/dx^2(J_1_110(x)), 1/2*d^2/dx^2(J_11_110(x));
    1/4!*(d^4/dx^4(J_5_110(x))), 1/4!*d^4/dx^4(J_1_110(x)), 1/4!*d^4/dx^4(J_11_110(x));
    1/2*d^2/dx^2(J_5_111(x)), 1/2*d^2/dx^2(J_1_111(x)), 1/2*d^2/dx^2(J_11_111(x));
    1/4!*d^4/dx^4(J_5_111(x)), 1/4!*d^4/dx^4(J_1_111(x)), 1/4!*d^4/dx^4(J_11_111(x))
] → [
    π^2, π^2, 4*π^2;
    -π^4/12, -π^4/3, -4*π^4/3;
    π^2, π^2, 4*π^2;
    -π^4/6, -π^4/6, -5*π^4/3;
    π^2, π^2, 4*π^2;
    -7*π^4/36, -π^4/9, -16*π^4/9
]
aa := svd2([9.87, 19.739, 78.957; -97.409, -779.273, -3.117*10^3; 961.389, 3.076*10^4, 1.231*10^5]) = [
    [126929; 73.6242; 0.0400803];
    [
        -0.000641771, 0.125663, -0.992073;
        0.0253179, -0.991753, -0.125638;
        -0.999679, -0.0251978, -0.00254503
    ];
    [
        -0.00759126, -0.242417, -0.970142;
        0.999957, 0.00328197, -0.00864465;
        -0.00527959, 0.970166, -0.242382
    ]
]
rank(MS) = 3
4*MS = [
    39.4784, 39.4784, 157.914;
    -32.4697, -129.879, -519.515;
    39.4784, 39.4784, 157.914;
    -64.9394, -64.9394, -649.394;
    39.4784, 39.4784, 157.914;
    -75.7626, -43.2929, -692.687
]
rank(MS) = 3
aa[0] = [126929; 73.6242; 0.0400803]
Rh := [-142.5352; 18760; -80.6464; 1.7088*10^4; -60.8472; 1.6527*10^4] = [-142.535; 18760; -80.6464; 17088; -60.8472; 16527]
# dir 100
# DH: -0.249392; +  1994.875876*x^2 + -925.847152*x^4
# ERR: -0.000000*x + 0.000000*x^3
# Delta: 0.39164
# dir 110
# DH: -0.581097; +  2027.377915*x^2 + -2121.094392*x^4
# ERR: -0.000000*x + 0.000000*x^3
# Delta: 0.10225
# dir 111
# DH: -0.165590; +  1990.125056*x^2 + -1785.202625*x^4
# ERR: -0.000000*x + 0.000000*x^3
Rh := [1994.875876; -925.847152; 2027.377915; -2121.094392; 1990.125056; -1785.202625] = [1994.88; -925.847; 2027.38; -2121.09; 1990.13; -1785.2]
lsolve(MS, Rh)/4 = [57.3123; 9.00039; -3.88689]
x := 0.25
M1a := [
    J_5_100(x), J_1_100(x), J_11_100(x);
    d/dx(J_5_100(x)), d/dx(J_1_100(x)), d/dx(J_11_100(x));
    1/2*d^2/dx^2(J_5_100(x)), 1/2*d^2/dx^2(J_1_100(x)), 1/2*d^2/dx^2(J_11_100(x));
    1/3!*(d^3/dx^3(J_5_100(x))), 1/3!*d^3/dx^3(J_1_100(x)), 1/3!*d^3/dx^3(J_11_100(x));
    1/4!*(d^4/dx^4(J_5_100(x))), 1/4!*d^4/dx^4(J_1_100(x)), 1/4!*d^4/dx^4(J_11_100(x))
] → [
    0.585786437627, 0.5, 2.0;
    4.44288293816, 3.14159265359, 12.5663706144;
    6.97886419964, 3.02922587605e-28, 0.0;
    -7.3082495, -20.6708511202, -82.6834044808;
    -5.73988573495, -1.07705808926e-27, 0.0
]
rank(M1a) = 2
# DR expansion  in 110 direction:
M2a := [
    J_5_110(x), J_1_110(x), J_11_110(x);
    d^1/dx^1(J_5_110(x)), d^1/dx^1(J_1_110(x)), d^1/dx^1(J_11_110(x));
    1/2*d^2/dx^2(J_5_110(x)), 1/2*d^2/dx^2(J_1_110(x)), 1/2*d^2/dx^2(J_11_110(x));
    1/3!*d^3/dx^3(J_5_110(x)), 1/3!*d^3/dx^3(J_1_110(x)), 1/3!*d^3/dx^3(J_11_110(x));
    1/4!*(d^4/dx^4(J_5_110(x))), 1/4!*d^4/dx^4(J_1_110(x)), 1/4!*d^4/dx^4(J_11_110(x))
] → [
    2 - 2*cos(0.392699081699*sqrt(2))^2, 2*sin(0.392699081699*sqrt(2))^2, 3 - cos(sqrt(2)*0.785398163397)^2 - 2*cos(0.785398163397*sqrt(2));
    2*π*sqrt(2)*cos(0.392699081699*sqrt(2))*sin(0.392699081699*sqrt(2)), 2*π*sqrt(2)*cos(0.392699081699*sqrt(2))*sin(0.392699081699*sqrt(2)), 2*π*sqrt(2)*sin(0.785398163397*sqrt(2)) + 2*π*sqrt(2)*cos(0.785398163397*sqrt(2))*sin(0.785398163397*sqrt(2));
    π^2*cos(0.392699081699*sqrt(2))^2 - π^2*sin(0.392699081699*sqrt(2))^2, π^2*cos(0.392699081699*sqrt(2))^2 - π^2*sin(0.392699081699*sqrt(2))^2, 2*π^2*cos(0.785398163397*sqrt(2)) + 2*π^2*cos(0.785398163397*sqrt(2))^2 - 2*π^2*sin(0.785398163397*sqrt(2))^2;
    -2*sqrt(2)*π^3*cos(0.392699081699*sqrt(2))*sin(0.392699081699*sqrt(2))/3, -2*sqrt(2)*π^3*cos(0.392699081699*sqrt(2))*sin(0.392699081699*sqrt(2))/3, -2*sqrt(2)*π^3*sin(0.785398163397*sqrt(2))/3 - 8*sqrt(2)*π^3*cos(0.785398163397*sqrt(2))*sin(0.785398163397*sqrt(2))/3;
    π^4*sin(0.392699081699*sqrt(2))^2/6 - π^4*cos(0.392699081699*sqrt(2))^2/6, π^4*sin(0.392699081699*sqrt(2))^2/6 - π^4*cos(0.392699081699*sqrt(2))^2/6, 4*π^4*sin(0.785398163397*sqrt(2))^2/3 - 4*π^4*cos(0.785398163397*sqrt(2))^2/3 - π^4*cos(0.785398163397*sqrt(2))/3
]
rank(M2a) = 2
# DR expansion  in 111 direction:
M3a := [
    1/2*d^2/dx^2(J_5_111(x)), 1/2*d^2/dx^2(J_1_111(x)), 1/2*d^2/dx^2(J_11_111(x));
    1/4!*(d^4/dx^4(J_5_111(x))), 1/4!*d^4/dx^4(J_1_111(x)), 1/4!*d^4/dx^4(J_11_111(x))
] → [
    π^2*cos(0.261799387799*sqrt(3))^3 - 2*π^2*cos(0.261799387799*sqrt(3))*sin(0.261799387799*sqrt(3))^2, π^2*cos(0.261799387799*sqrt(3))^2 - π^2*sin(0.261799387799*sqrt(3))^2, 4*π^2*cos(0.523598775598*sqrt(3))^2 - 4*π^2*sin(0.523598775598*sqrt(3))^2;
    5*π^4*cos(0.261799387799*sqrt(3))*sin(0.261799387799*sqrt(3))^2/9 - 7*π^4*cos(0.261799387799*sqrt(3))^3/36, π^4*sin(0.261799387799*sqrt(3))^2/9 - π^4*cos(0.261799387799*sqrt(3))^2/9, 16*π^4*sin(0.523598775598*sqrt(3))^2/9 - 16*π^4*cos(0.523598775598*sqrt(3))^2/9
]
MS := [
    J_5_100(x), J_1_100(x), J_11_100(x);
    d^1/dx^1(J_5_100(x)), d^1/dx^1(J_1_100(x)), d^1/dx^1(J_11_100(x));
    1/2*d^2/dx^2(J_5_100(x)), 1/2*d^2/dx^2(J_1_100(x)), 1/2*d^2/dx^2(J_11_100(x));
    1/3!*d^3/dx^3(J_5_100(x)), 1/3!*d^3/dx^3(J_1_100(x)), 1/3!*d^3/dx^3(J_11_100(x));
    1/4!*d^4/dx^4(J_5_100(x)), 1/4!*d^4/dx^4(J_1_100(x)), 1/4!*d^4/dx^4(J_11_100(x));
    J_5_110(x), J_1_110(x), J_11_110(x);
    d^1/dx^1(J_5_110(x)), d^1/dx^1(J_1_110(x)), d^1/dx^1(J_11_110(x));
    1/2*d^2/dx^2(J_5_110(x)), 1/2*d^2/dx^2(J_1_110(x)), 1/2*d^2/dx^2(J_11_110(x));
    1/3!*d^3/dx^3(J_5_110(x)), 1/3!*d^3/dx^3(J_1_110(x)), 1/3!*d^3/dx^3(J_11_110(x));
    1/4!*(d^4/dx^4(J_5_110(x))), 1/4!*d^4/dx^4(J_1_110(x)), 1/4!*d^4/dx^4(J_11_110(x));
    J_5_111(x), J_1_111(x), J_11_111(x);
    d^1/dx^1(J_5_111(x)), d^1/dx^1(J_1_111(x)), d^1/dx^1(J_11_111(x));
    1/2*d^2/dx^2(J_5_111(x)), 1/2*d^2/dx^2(J_1_111(x)), 1/2*d^2/dx^2(J_11_111(x));
    1/3!*d^3/dx^3(J_5_111(x)), 1/3!*d^3/dx^3(J_1_111(x)), 1/3!*d^3/dx^3(J_11_111(x));
    1/4!*d^4/dx^4(J_5_111(x)), 1/4!*d^4/dx^4(J_1_111(x)), 1/4!*d^4/dx^4(J_11_111(x))
]  # error: The symbolic result returned is too large to display, but it can be used in subsequent calculations if assigned to a function or variable.
# [component: inputs MS]
rank(MS) = 3
TM := [
    1, 0, 0;
    0, 1, 0;
    0, 0, 1;
    1, 0, 0;
    0, 1, 0;
    0, 0, 1;
    1, 0, 0;
    0, 1, 0;
    0, 0, 1;
    1, 0, 0;
    0, 1, 0;
    0, 0, 1;
    1, 0, 0;
    0, 1, 0;
    0, 0, 1
]
rank(TM) = 3
