f(t) := (1 - R)*(a*t)^2*exp(-|a|*t) + R*a^2*b/(a - b)^3*(2*exp(-|b|*t) - (2 + 2*(a - b)*t + (a + b)^2*t^2)*exp(-|a|*t))
d/dt(f(t)) → a^2*t^2*e^(-t*|a|)*|a|*(R - 1) - 2*a^2*t*e^(-t*|a|)*(R - 1) - R*a^2*b*(2*e^(-t*|b|)*|b| + e^(-t*|a|)*(2*a - 2*b + 2*t*(a + b)^2) - e^(-t*|a|)*|a|*(t*(2*a - 2*b) + t^2*(a + b)^2 + 2))/(a - b)^3
Cf1(t) := a^2*t^2*e^(-t*|a|)*|a|*(R - 1) - 2*a^2*t*e^(-t*|a|)*(R - 1) - R*a^2*b*(2*e^(-t*|b|)*|b| + e^(-t*|a|)*(2*a - 2*b + 2*t*(a + b)^2) - e^(-t*|a|)*|a|*(t*(2*a - 2*b) + t^2*(a + b)^2 + 2))/(a - b)^2
Cf1(0) → -R*a^2*b*(2*a - 2*b - 2*|a| + 2*|b|)/(a - b)^2
C1 := -R*a^2*b*(2*a - 2*b - 2*a + 2*b)/(a - b)^2 factor → 0
d^2/dt^2(f(t)) → R*a^2*b*(2*e^(-t*|b|)*|b|^2 - 2*e^(-t*|a|)*(a + b)^2 + 2*e^(-t*|a|)*|a|*(2*a - 2*b + 2*t*(a + b)^2) - e^(-t*|a|)*|a|^2*(t*(2*a - 2*b) + t^2*(a + b)^2 + 2))/(a - b)^3 - a^2*t^2*e^(-t*|a|)*|a|^2*(R - 1) - 2*a^2*e^(-t*|a|)*(R - 1) + 4*a^2*t*e^(-t*|a|)*|a|*(R - 1)
Cf2(t) := R*a^2*b*(2*e^(-t*|b|)*|b|^2 - 2*e^(-t*|a|)*(a + b)^2 + 2*e^(-t*|a|)*|a|*(2*a - 2*b + 2*t*(a + b)^2) - e^(-t*|a|)*|a|^2*(t*(2*a - 2*b) + t^2*(a + b)^2 + 2))/(a - b)^3 - a^2*t^2*e^(-t*|a|)*|a|^2*(R - 1) - 2*a^2*e^(-t*|a|)*(R - 1) + 4*a^2*t*e^(-t*|a|)*|a|*(R - 1)
Cf2(0) → -2*a^2*(R - 1) - R*a^2*b*(2*(a + b)^2 + 2*|a|^2 - 2*|b|^2 - 2*|a|*(2*a - 2*b))/(a - b)^3
C2 := -2*a^2*(R - 1) - R*a^2*b*(2*(a + b)^2 + 2*a^2 - 2*b^2 - 2*a*(2*a - 2*b))/(a - b)^3 factor → -2*a^2*(R*a^3 - R*b^3 - 3*a*b^2 + 3*a^2*b - a^3 + b^3 + 7*R*a*b^2 - 3*R*a^2*b)/(a - b)^3
C2 := 2*a^2*((1 - R) - 4*R*a*b^2/(a - b)^3)
2*(a + b)^2 + 2*a^2 - 2*b^2 - 2*a*(2*a - 2*b) factor → 8*a*b
integral(f(t), t = 0 .. ∞) → -2*a^2*(b^3*|b| - a^3*|b| - R*b*|a|^3 + R*a^3*|b| - 3*a*b^2*|b| + 3*a^2*b*|b| + 5*R*a*b^2*|b| - 2*R*a^2*b*|b| + R*b*|a|^2*|b| - R*b^2*|a|*|b| + R*a*b*|a|*|b|)/(|a|^3*|b|*(a - b)^3)
(-2*a^2*(b^3*b - a^3*b - R*b*a^3 + R*a^3*b - 3*a*b^2*b + 3*a^2*b*b + 5*R*a*b^2*b - 2*R*a^2*b*b + R*b*a^2*b - R*b^2*a*b + R*a*b*a*b)/(a^3*b*(a - b)^3)) → -2*(b^4 - a^3*b - 3*a*b^3 + 3*a^2*b^2 + 4*R*a*b^3)/(a*b*(a - b)^3)
-2*(b^4 - a^3*b - 3*a*b^3 + 3*a^2*b^2 + 4*R*a*b^3)/(a*b*(a - b)^3) simplify → 2/a - 8*R*b^2/(a - b)^3
Norma == 2/a - 8*R*b^2/(a - b)^3
C2 := 2*a^2*(1 - R - 4*R*a*b^2/(a - b)^3)
U == 2*R*a*b^2/(a - b)^3
Norma == 2/a*(1 - 2*U)
C2 := 2*a^2*(1 - R - 2*U)
